# OpenSim document version 20302
MarkerSet gait2354_Scale:
  Marker RSHO: torso (-0.03 0.44 0.15)
  Marker LSHO: torso (-0.03 0.44 -0.15)
  Marker RFWT: pelvis (0.02 0.03 0.128)
  Marker LFWT: pelvis (0.02 0.03 -0.128)
  Marker RBWT: pelvis (-0.16 0.04 0.04)
  Marker LBWT: pelvis (-0.16 0.04 -0.04)
  Marker RTHI: femur_r (0.018 -0.2 0.064)
  Marker RKNE: femur_r (0 -0.404 0.05)
  Marker RSHN: tibia_r (0.02 -0.13 0.05)
  Marker RANK: tibia_r (-0.005 -0.41 0.053)
  Marker RHEE: calcn_r (-0.02 0.02 0)
  Marker RMT5: calcn_r (0.19 0 0.065)
  Marker RTOE: calcn_r (0.19 0.005 -0.04)
  Marker LTHI: femur_l (0.018 -0.2 -0.064)
  Marker LKNE: femur_l (0 -0.404 -0.05)
  Marker LSHN: tibia_l (-0.02 -0.13 -0.05)
  Marker LANK: tibia_l (-0.005 -0.41 -0.053)
  Marker LHEE: calcn_l (-0.02 0.02 0)
  Marker LMT5: calcn_l (0.19 0 -0.065)
  Marker LTOE: calcn_l (0.19 0.005 0.04)
